OpenVSP model (file version 5), 6 components.
Geometry view with OpenVSP parameter names; values to 6 digits, angles in degrees, lengths in the model's unit.
Overall bounding box: X_Min=-1.31827 X_Len=27.9434 Y_Min=-18.0938 Y_Len=36.1876 Z_Min=-3.11571 Z_Len=9.91106

Fuselage "Fuselage"
  location (X Y Z) 0 0 0, rotation 0 0 0
  bounding box size 24.7492 4.49149 5.42403
  Design: Length=24.58
  cross sections:
    n  XLocPercent  YLocPercent  ZLocPercent  shape
    0  0            0            0            point
    1  9.5e-05      0            0            circle Circle_Diameter=1.029
    2  0.00793233   0            0            general fuselage BotStr=0.5 BotTanAngle=90 CornerRad=0.5 Height=1.5 LowStr=1.3 MaxWidthLoc=0.3 TopStr=1.12 TopTanAngle=90 UpStr=0.83 Width=2.8
    3  0.0482465    0            -0.020391    general fuselage BotStr=1.464 BotTanAngle=90 CornerRad=0 Height=3 LowStr=0.83 MaxWidthLoc=0.25 TopStr=1.58293 TopTanAngle=90 UpStr=0.5 Width=3.13984
    4  0.155167     0            -0.0163934   general fuselage BotStr=1.5 BotTanAngle=90 CornerRad=0 Height=3.7 LowStr=1 MaxWidthLoc=0.15 TopStr=1.5 TopTanAngle=90 UpStr=1 Width=3.6218
    5  0.251439     0            0.01         general fuselage BotStr=0.83 BotTanAngle=90 CornerRad=0 Height=5.176 LowStr=0.83 MaxWidthLoc=-0.3 TopStr=1.7 TopTanAngle=90 UpStr=2 Width=3.85
    6  0.45486      0            0.0204262    general fuselage BotStr=0.96075 BotTanAngle=90 CornerRad=0 Height=4.37592 LowStr=0.50325 MaxWidthLoc=-0.3 TopStr=1.7 TopTanAngle=90 UpStr=2 Width=3.85
    7  0.59372      0            0.0163934    general fuselage BotStr=0.65 BotTanAngle=90 CornerRad=0 Height=2.7 LowStr=0.75 MaxWidthLoc=-0.5 TopStr=1.7 TopTanAngle=90 UpStr=2 Width=2.7
    8  0.984264     0            0.0491803    general fuselage BotStr=1.5 BotTanAngle=90 CornerRad=0 Height=0.9 LowStr=1 MaxWidthLoc=0 TopStr=1.5 TopTanAngle=90 UpStr=1.5 Width=0.44
    9  1            0            0.0645658    point

Wing "MainWing"
  location (X Y Z) 5.90164 0 2.67, rotation 0 0 0
  symmetric about XZ
  bounding box size 5.5118 36.1876 1.14181
  totals: TotalSpan=36.2 TotalProjectedSpan=36.1876 TotalChord=4.7572 TotalArea=172.211 TotalAR=7.6043 MAC=4.7971
  root: chord 5.5118, twist 0, airfoil file ""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 BaseThickChord=1 ThickChord=0.14
  sections:
    n  Span  Root_Chord  Tip_Chord  Area     Sweep  Sweep_Location  Dihedral  Twist  Twist_Location  tip airfoil
    1  18.1  5.5118      4.0026     86.1053  0      0               1.5       0      0.25            airfoil file ""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 BaseThickChord=1 ThickChord=0.141

Fuselage "Hub"
  location (X Y Z) 0.356 0 0, rotation 0 0 180
  bounding box size 1.67427 1 1
  Design: Length=1.67427
  cross sections:
    n  XLocPercent  YLocPercent  ZLocPercent  shape
    0  0            0            0            point
    1  0.25         0            0            circle Circle_Diameter=1
    2  1            0            0            point

Wing "HorizontalTail"
  location (X Y Z) 19.9141 0 1.22951, rotation 0 0 0
  symmetric about XZ
  bounding box size 4.48759 12.99 0.569475
  totals: TotalSpan=12.99 TotalProjectedSpan=12.99 TotalChord=3.4995 TotalArea=45.4585 TotalAR=3.71196 MAC=3.57318
  root: chord 2.62, twist 0, NACA 4-series Camber=0 CamberLoc=0.2 ThickChord=0.13
  sections:
    n  Span     Root_Chord  Tip_Chord  Area     Sweep    Sweep_Location  Dihedral  Twist  Twist_Location  tip airfoil
    1  0.86652  2.62        4.379      3.03239  7.14286  0               0         0      0.25            as above
    2  5.62848  4.379       2.62       19.6969  0        0.5             0         0      0.25            as above

Wing "VerticleTail"
  location (X Y Z) 24.58 0 1.63, rotation -90 0 -180
  bounding box size 11.6452 0.960557 5.16536
  totals: TotalSpan=5.16536 TotalProjectedSpan=5.16536 TotalChord=4.39166 TotalArea=20.6841 TotalAR=1.28992 MAC=4.69395
  root: chord 9.6, twist 0, NACA 4-series Camber=0 CamberLoc=0.2 ThickChord=0.1
  sections:
    n  Span      Root_Chord  Tip_Chord  Area     Sweep  Sweep_Location  Dihedral  Twist  Twist_Location  tip airfoil
    1  0.757677  9.6         5.46548    5.70738  -20    0               0         0      0.25            as above
    2  0.851576  5.46548     3.80151    3.94577  -20    0               0         0      0.25            as above
    3  0.508015  3.80151     3.46244    1.8451   -20    0               0         0      0.25            as above
    4  1.01603   3.46244     3.09617    3.33187  -20    0               0         0      0.25            as above
    5  2.03206   3.09617     2.66542    5.85395  -24    0               0         0      0.25            as above

Propeller "Propeller"
  location (X Y Z) -0.327869 0 0, rotation 0 0 0
  bounding box size 0.409596 5.46759 5.95013
  Design: Diameter=6.66 NumBlade=3 Beta34=26.2992 UseBeta34Flag=1 Feather=6.29921 Rotate=-5.51181 Precone=0.708661 ReverseFlag=0 FoldAngle=0 PropMode=0 AF=147.09 CLi=0.524041 Chord=0.184375 Solidity=0.176065 ConstructXoC=0.5 FeatherAxisXoC=0.5 FeatherOffsetXoC=0
  cross sections:
    n  RadiusFrac  shape
    0  0.4         ellipse Ellipse_Height=0.1332 Ellipse_Width=0.2664
    1  0.400001    NACA 16-series Chord=0.266403 IdealCl=0.0207907 ThickChord=0.494037
    2  1           NACA 16-series Chord=0.4329 IdealCl=0.2 ThickChord=0.03
  Chord along r/R (cubic Bezier): 0.4: 0.08, 0.466667: 0.15, 0.533333: 0.2, 0.6: 0.2, 0.716667: 0.2, 0.833333: 0.2, 0.95: 0.2, 0.966667: 0.2, 0.983333: 0.2, 1: 0.13
  Twist along r/R (PCHIP): 0.4: 46.75, 0.75: 20, 1: 13
  Thick along r/R (cubic Bezier): 0.4: 0.5, 0.400033: 0.3, 0.400067: 0.225, 0.4001: 0.2, 0.466733: 0.125, 0.533367: 0.115, 0.6: 0.1, 0.733333: 0.075, 0.866667: 0.055, 1: 0.03
  CLI along r/R (cubic Bezier): 0.4: 0, 0.400033: 0.7, 0.400067: 0.7, 0.4001: 0.7, 0.466733: 0.7, 0.533367: 0.7, 0.6: 0.7, 0.733333: 0.7, 0.866667: 0.7, 1: 0.2
